# Bearing Sizing
# Spindle Shaft Characteristics
# Applied Forces
F_feed_z := 400 N
F_cut_x := 90 N
F_cut_y := 100 N
# Rotational Speed | Geometry Between Bearings
N_rot := 700 rpm
D_cd := 5 cm
L_cd := 6 cm
# Young's Modulus | Shaft Stiffness
E_s := 210 GPa
K_s := π*(D_cd/2)^2*E_s/L_cd = 6872.23 N/μm
# Spindle Housing Characteristics
# Outer Diameter | Inner Diameter | Total Length
D_h_outer := 72 mm
D_h_inner := 45 mm
L_h := 110 mm
# Young's Modulus | Housing Stiffness
E_h := 69 GPa
K_h := π*((D_h_outer/2)^2 - (D_h_inner/2)^2)*E_h/L_h = 1556.31 N/μm
# Washers Characteristics (9712K89, Belleville Disc Springs)
# Working Load | Flat Load | Deflection @ Working Load
P_w := 1400 lbf = 6.22751 kN
P_w_flat := 2833 lbf
δ_w := 0.013 in
# Washer Stiffness | Number of washers
K_w := P_w/δ_w = 18.8598 N/μm
N_w := 4
# Bearing Parameters (LM11949 - LM11910, Tapered Roller Bearings)
# ISO factors | Bearing Stiffness
e := 0.30
Y_2 := 2
K_b := 53 N/μm
# Dynamic Radial Rating (1 million revolutions)
C_1 := 39100 N
# Static Radial Rating
C_0 := 32000 N
# Dynamic Thrust Rating (90 million revolutions)
C_a90 := 5220 N
# Bolt Characteristics (M5)
# Pitch Diameter | Clamped Length | Young's Modulus
D_bolt := 4.480 mm
L_bolt := 10 mm
E_bolt := 210 GPa  # I assumed same bolt geometry on both ends of the spindle housing.
# Bolt Stiffness | Number of bolts
N_bolts := 6
K_bolt := π*(D_bolt/2)^2*E_bolt/L_bolt = 331.028 N/μm
# Preload calculation
# Displacement under axial load
δ_axial := F_feed_z*(1/K_s + 1/K_b + 1/(N_bolts*K_bolt) + 1/K_h + 1/(N_bolts*K_bolt)) = 8.26518 μm
# Minimum Preload
F_preload_min := δ_axial/(1/K_b + 1/K_s + 1/K_b + N_w/K_w + 1/(N_bolts*K_bolt) + 1/K_h) = 32.9135 N
# Bearing Forces
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# Preload
# Factor of Safety | Force
s := 2
F_preload := s*F_preload_min
# Radial Loads | Axial Load
F_r := sqrt(F_cut_x^2 + F_cut_y^2) = 134.536 N
F_a := F_preload + F_feed_z = 465.827 N
# Dynamic Equivalent Radial Load
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P_r :=
    if F_a/F_r ≤ e
        F_r
    else
        0.4*F_r + Y_2*F_a
# Bearing Life
L_10 := (C_1/P_r)^(10/3)*(10^6/(60*N_rot)) = 13454.5 hr
