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# Spindle Model take 2
# Non-Spindle Shaft Dimensions
D_bearing_inner := 0.75 in
D_chuck := 1.4 cm
D_part := 40 mm
L_part := 5 cm
# Applied Forces
F_cut_x := 10 N
F_cut_y := 115 N
F_feed_z := -50 N
T_pulley := 3.45 N*m
F_preload := 314 N
F_t := 60 N
M_resist := -0.01*F_preload*D_bearing_inner/2
# Spindle Shaft Dimensions
L_ef := 2.35 cm
L_de := 1.66 cm
L_cd := 2 cm
L_bc := 1.66 cm
L_ab := 1 cm
D_ef := D_chuck
D_de := D_bearing_inner
D_cd := 5 cm
D_bc := D_bearing_inner
D_ab := 0.75 in
L.total := L_ef + L_de + L_cd + L_bc + L_ab = 3.41339 in
a_bearing := 5.6 mm
L_a := L_ab + L_bc + a_bearing
L_b := L_ab + L_bc + L_cd - a_bearing
# Calculate Bearing Forces
R_a_y := (F_cut_y*(L_part + L.total - L_a) - F_t*L_a)/(L_b - L_a) - F_t - F_cut_y = 971.08 N
R_b_y := -(F_cut_y*(L_part + L.total - L_a) - F_t*L_a)/(L_b - L_a) = -1146.08 N
L_part + L_total
R_a_x := (F_cut_x*(L_part + L.total - L_a) + F_feed_z*D_part/2)/(L_b - L_a) - F_cut_x
R_b_x := -(F_cut_x*(L_part + L.total - L_a) + F_feed_z*D_part/2)/(L_b - L_a) = -5.11364 N
R_a_y/(R_b_y + R_a_y) = -5.54903
R_b_z := -F_preload
M_mot := F_cut_y*D_part/2 + M_resist
M_r := (L_cd + (L_bc/2) + (L_de/2))*(R_a_y - R_b_y)
R_a_z := -F_feed_z + F_preload
# Material Properties - 12L14 and Bearing Stiffness
E := 200 GPa
E_part := 200 GPa
K_b := 32.239 N/μm
G := 80 GPa
G_part := 80 GPa
# HTMS - FP
I_fp := π*D_part^4/64
J_fp := π*D_part^4/32
A_fp := π*D_part^2/2
U_S := [1, 0, 0, 0; 0, 1, 0, 0; 0, 0, 1, 0; 0*m^-1, 0 m^-1, 0 m^-1, 1 m^-1]
# Nominal geometry
T_n_fp := [1, 0, 0, 0 m; 0, 1, 0, 0 m; 0, 0, 1, L_part; 0, 0, 0, 1*m]
# Translation errors
T_z_fp := [1, 0, 0, 0*m; 0, 1, 0, 0*m; 0, 0, 1, F_feed_z*L_part/(E_part*A_fp); 0, 0, 0, 1*m]
T_y_fp := [1, 0, 0, 0*m; 0, 1, 0, F_cut_y*L_part^3/(3*E_part*I_fp); 0, 0, 1, 0*m; 0, 0, 0, 1*m]
T_x_fp := [1, 0, 0, F_cut_x*L_part^3/(3*E_part*I_fp); 0, 1, 0, 0*m; 0, 0, 1, 0*m; 0, 0, 0, 1*m]
# Rotation errors
R_z_fp := [
    1, F_cut_y*D_part/2*L_part/(J_fp*G_part), 0, 0*m;
    -F_cut_y*D_part/2*L_part/(J_fp*G_part), 1, 0, 0*m;
    0, 0, 1, 0*m;
    0, 0, 0, 1*m
] = [1, 5.71963e-6, 0, 0 m; -5.71963e-6, 1, 0, 0 m; 0, 0, 1, 0 m; 0, 0, 0, 1 m]
R_x_fp := [
    1, 0, 0, 0*m;
    0, 1, F_cut_y*L_part^2/(2*E_part*I_fp), 0*m;
    0, -(F_cut_y*L_part^2/(2*E_part*I_fp)), 1, 0*m;
    0, 0, 0, 1*m
] = [1, 0, 0, 0 m; 0, 1, 5.71963e-6, 0 m; 0, -5.71963e-6, 1, 0 m; 0, 0, 0, 1 m]
R_y_fp := [
    1, 0, F_cut_x*L_part^2/(2*E_part*I_fp), 0*m;
    0, 1, 0, 0*m;
    -(F_cut_x*L_part^2/(2*E_part*I_fp)), 0, 1, 0*m;
    0, 0, 0, 1*m
] = [1, 0, 4.97359e-7, 0 m; 0, 1, 0, 0 m; -4.97359e-7, 0, 1, 0 m; 0, 0, 0, 1 m]
# Actual Position
T_fp := (U_S*T_n_fp)*U_S*T_x_fp*U_S*T_y_fp*U_S*T_z_fp
I := [1 m; 1 m; 1 m; 1 m]
R_fp := (U_S*R_x_fp)*(U_S*R_y_fp)*(U_S*R_z_fp)
R_fp*U_S*I - U_S*I = [6.21699e-6 m; -2.84472e-12 m; -6.21696e-6 m; 0]
H_fp := T_fp*R_fp
# Segment EF
I_ef := π*D_ef^4/64
J_ef := π*D_ef^4/32
A_ef := π*D_ef^2/2
# Local Forces
F_z_ef := F_feed_z
F_y_ef := F_cut_y
F_x_ef := F_cut_x
M_z_ef := -F_cut_y*D_part/2
M_y_ef := F_cut_x*L_part
M_x_ef := F_cut_y*L_part
# Nominal geometry
T_n_ef := [1, 0, 0, 0*m; 0, 1, 0, 0*m; 0, 0, 1, L_ef; 0, 0, 0, 1*m]
# Translation errors
T_z_ef := [1, 0, 0, 0*m; 0, 1, 0, 0*m; 0, 0, 1, F_z_ef*L_ef/(A_ef*E); 0, 0, 0, 1*m]
T_y_ef := [
    1, 0, 0, 0*m;
    0, 1, 0, M_x_ef*L_ef^2/(2*E*I_ef) + F_y_ef*L_ef^3/(3*E*I_ef);
    0, 0, 1, 0*m;
    0, 0, 0, 1*m
]
T_x_ef := [
    1, 0, 0, M_y_ef*L_ef^2/(2*E*I_ef) + F_x_ef*L_ef^3/(3*E*I_ef);
    0, 1, 0, 0*m;
    0, 0, 1, 0*m;
    0, 0, 0, 1*m
]
# Rotation errors
R_z_ef := [1, -(M_z_ef*L_ef/(J_ef*G)), 0, 0*m; M_z_ef*L_ef/(J_ef*G), 1, 0, 0*m; 0, 0, 1, 0*m; 0, 0, 0, 1*m] = [1, 0.00017914, 0, 0 m; -0.00017914, 1, 0, 0 m; 0, 0, 1, 0 m; 0, 0, 0, 1 m]
R_x_ef := [
    1, 0, 0, 0*m;
    0, 1, M_x_ef*L_ef/(E*I_ef) + F_y_ef*L_ef^2/(2*E*I_ef), 0*m;
    0, -(M_x_ef*L_ef/(E*I_ef) + F_y_ef*L_ef^2/(2*E*I_ef)), 1, 0*m;
    0, 0, 0, 1*m
] = [1, 0, 0, 0 m; 0, 1, 0.000442477, 0 m; 0, -0.000442477, 1, 0 m; 0, 0, 0, 1 m]
R_y_ef := [
    1, 0, M_y_ef*L_ef/(E*I_ef) + F_x_ef*L_ef^2/(2*E*I_ef), 0*m;
    0, 1, 0, 0*m;
    -(M_y_ef*L_ef/(E*I_ef) + F_x_ef*L_ef^2/(2*E*I_ef)), 0, 1, 0*m;
    0, 0, 0, 1*m
] = [1, 0, 3.84763e-5, 0 m; 0, 1, 0, 0 m; -3.84763e-5, 0, 1, 0 m; 0, 0, 0, 1 m]
# Actual Position
T_ef := U_S*T_n_ef*U_S*T_x_ef*U_S*T_y_ef*U_S*T_z_ef
R_ef := U_S*R_x_ef*U_S*R_y_ef*U_S*R_z_ef
R_ef*U_S*I - U_S*I = [0.000217617 m; 0.000263319 m; -0.000480881 m; 0]
H_ef := T_ef*R_ef
# Before EF
# Bearing tilt
L_ab_bearing := L_cd - 2*a_bearing
θ_y := (R_a_x + R_b_x)/(L_ab_bearing*K_b)
θ_x := (R_a_y + R_b_y)/(L_ab_bearing*K_b)
δ_x_bearing := (R_a_x + R_b_x)/(2*K_b)
δ_y_bearing := (R_a_y + R_b_y)/(2*K_b)
T_y_bearing := [1, 0, 0, 0*m; 0, 1, 0, δ_y_bearing; 0, 0, 1, 0*m; 0, 0, 0, 1*m]
T_x_bearing := [1, 0, 0, δ_x_bearing*m; 0, 1, 0, 0*m; 0, 0, 1, 0*m; 0, 0, 0, 1*m]
R_x_ef := [1, 0, 0, 0*m; 0, 1, θ_y, 0*m; 0, -θ_y, 1, 0*m; 0, 0, 0, 1*m]
R_y_ef := [1, 0, θ_x, 0*m; 0, 1, 0, 0*m; -θ_x, 0, 1, 0*m; 0, 0, 0, 1*m]
# Axial Forces
# Bending y
R_ef*U_S*I - U_S*I = [0.000217617 m; 0.000263319 m; -0.000480881 m; 0]
