# Spindle Calculations
pi := 3.14159
# Assumptions:
# - Fixed Bearings
# - Perfect Turning about Z
# General Notes: 3/6/2023
# - The bearing load might not be in the center of BC and DE, ask
# - Ask about where to set the origin
# Applied Forces
F_cut_x := 90 N
F_cut_y := 100 N
F_feed_z := 400 N
F_t := 1 N
F_preload := 1 N
D_part := 2.5 cm
L_part := 5 cm
# L_part is the length of the part from the end of the chuck
M_resist := F_preload*0 m
# Spindle Shaft Dimensions
R_spindle_ab := 1 cm
L_ef := 2.35 cm
L_de := 1.66 cm
L_cd := 3 cm
L_bc := 1.66 cm
L_ab := 3.17 cm
R_spindle_fg := 1 cm
R_spindle_be := 1 cm
D_ef := 1.4 cm
D_de := 1.9 cm
D_cd := 10 cm
D_bc := 1.9 cm
D_ab := 1.9 cm
R_spindle_ef := 1 cm
L_total := L_ef + L_de + L_cd + L_bc + L_ab
L_a := L_ab + L_bc/2
L_b := L_ab + L_bc + L_cd + L_de/2
# Calculate Bearing Forces
Ra_y := (F_cut_y*(L_total - L_a) - F_t*L_a)/(L_b - L_a) - F_t - F_cut_y
Rb_y := -(F_cut_y*(L_total - L_a) - F_t*L_a)/(L_b - L_a)
Ra_x := (F_cut_x*(L_total - L_a) + F_cut_y*L_part)/(L_b - L_a) - F_cut_x
Rb_x := -(F_cut_x*(L_total - L_a) + F_cut_y*L_part)/(L_b - L_a)
Ra_z := F_feed_z
M_mot := F_cut_y*D_part/2 + M_resist
# Material Properties - 12L14
E := 200 GPa
E_part := 200 GPa
G := 80 GPa
G_part := 80 GPa
# HTMS - FP
Ifp := pi*D_part^4/64
Jfp := pi*D_part^4/32
Afp := pi*D_part^2/2
U_s := [1, 0, 0, 0; 0, 1, 0, 0; 0, 0, 1, 0; 0*m^-1, 0 m^-1, 0 m^-1, 1 m^-1]
Rz_fp := [
    1, -(F_cut_y*D_part/2*L_part/(Jfp*G_part)), 0, 0*m;
    F_cut_y*D_part/2*L_part/(Jfp*G_part), 1, 0, 0*m;
    0, 0, 1, 0*m;
    0, 0, 0, 1*m
]
Rx_fp := [
    1, 0, 0, 0*m;
    0, 1, -(F_cut_y*L_part^2/(2*E_part*Ifp)), 0*m;
    0, F_cut_y*L_part^2/(2*E_part*Ifp), 1, 0*m;
    0, 0, 0, 1*m
] = [1, 0, 0, 0 m; 0, 1, -3.2595e-5, 0 m; 0, 3.2595e-5, 1, 0 m; 0, 0, 0, 1 m]
Ry_fp := [
    1, 0, F_cut_x*L_part^2/(2*E_part*Ifp), 0*m;
    0, 1, 0, 0*m;
    -(F_cut_x*L_part^2/(2*E_part*Ifp)), 0, 1, 0*m;
    0, 0, 0, 1*m
]
Tz_fp := [1, 0, 0, 0*m; 0, 1, 0, 0*m; 0, 0, 1, -F_feed_z*L_part/(E_part*Afp); 0, 0, 0, 1*m] = [1, 0, 0, 0 m; 0, 1, 0, 0 m; 0, 0, 1, -1.01859e-7 m; 0, 0, 0, 1 m]
Ty_fp := [1, 0, 0, 0*m; 0, 1, 0, F_cut_y*L_part^3/(3*E_part*Ifp); 0, 0, 1, 0*m; 0, 0, 0, 1*m]
Tx_fp := [1, 0, 0, F_cut_x*L_part^3/(3*E_part*Ifp); 0, 1, 0, 0*m; 0, 0, 1, 0*m; 0, 0, 0, 1*m]
Tn_fp := [1, 0, 0, 0 m; 0, 1, 0, 0 m; 0, 0, 1, L_part; 0, 0, 0, 1*m]
Tfp := (U_s*Tn_fp)*U_s*Tx_fp*U_s*Ty_fp*U_s*Tz_fp
Rfp := (U_s*Rx_fp)*(U_s*Ry_fp)*(U_s*Rz_fp)
Hfp := Tfp*Rfp
# Segment EF
Ief := pi*D_ef^4/64
Jef := pi*D_ef^4/32
Aef := pi*D_ef^2/2
Fx_ef := F_cut_x
Fz_ef := F_feed_z
Fy_ef := F_cut_y
Mz_ef := F_cut_y*D_part/2
My_ef := F_cut_x*L_part
Mx_ef := F_cut_y*L_part
Tz_ef := [1, 0, 0, 0*m; 0, 1, 0, 0*m; 0, 0, 1, F_feed_z*L_ef/(Aef*E); 0, 0, 0, 1*m]
Ty_ef := [1, 0, 0, 0*m; 0, 1, 0, Mx_ef*L_ef^2/(2*E*Ief) + Fy_ef*L_ef^3/(3*E*Ief); 0, 0, 1, 0*m; 0, 0, 0, 1*m]
Tx_ef := [1, 0, 0, My_ef*L_ef^2/(2*E*Ief) + Fx_ef*L_ef^3/(3*E*Ief); 0, 1, 0, 0*m; 0, 0, 1, 0*m; 0, 0, 0, 1*m]
Tn_ef := [1, 0, 0, 0*m; 0, 1, 0, 0*m; 0, 0, 1, L_ef; 0, 0, 0, 1*m]
Rz_ef := [1, -(Mz_ef*L_ef/(Jef*G)), 0, 0*m; Mz_ef*L_ef/(Jef*G), 1, 0, 0*m; 0, 0, 1, 0*m; 0, 0, 0, 1*m]
Rx_ef := [
    1, 0, 0, 0*m;
    0, 1, -(My_ef*L_ef/(E*Ief) + Fx_ef*L_ef^2/(2*E*Ief)), 0*m;
    0, My_ef*L_ef/(E*Ief) + Fx_ef*L_ef^2/(2*E*Ief), 1, 0*m;
    0, 0, 0, 1*m
]
Ry_ef := [
    1, 0, Mx_ef*L_ef/(E*Ief) + Fy_ef*L_ef^2/(2*E*Ief), 0*m;
    0, 1, 0, 0*m;
    -(Mx_ef*L_ef/(E*Ief) + Fy_ef*L_ef^2/(2*E*Ief)), 0, 1, 0*m;
    0, 0, 0, 1*m
]
Tef := U_s*Tn_ef*U_s*Tx_ef*U_s*Ty_ef*U_s*Tz_ef
Ref := U_s*Rx_ef*U_s*Ry_ef*U_s*Rz_ef
Hef := Tef*Ref
# Segment DE
Ide := pi*D_de^4/64
Jde := pi*D_de^4/32
Ade := pi*D_de^2/2
Fx_de := F_cut_x
Fz_de := F_feed_z
Fy_de := F_cut_y
Mz_de := F_cut_y*D_part/2
My_de := F_cut_x*(L_part + L_ef)
Mx_de := F_cut_y*(L_part + L_ef)
Tz_de := [1, 0, 0, 0*m; 0, 1, 0, 0*m; 0, 0, 1, Fz_de*L_de/(Ade*E); 0, 0, 0, 1*m]
Ty_de := [
    1, 0, 0, 0*m;
    0, 1, 0, Mx_de*L_de^2/(2*E*Ide) + Fy_de*L_de^3/(3*E*Ide) + 5*Rb_y*(L_de/2)^3/(2*3*E*Ide);
    0, 0, 1, 0*m;
    0, 0, 0, 1*m
]
Tx_de := [
    1, 0, 0, My_de*L_de^2/(2*E*Ide) + Fx_de*L_de^3/(3*E*Ide) + 5*Rb_x*(L_de/2)^3/(2*3*E*Ide);
    0, 1, 0, 0*m;
    0, 0, 1, 0*m;
    0, 0, 0, 1*m
]
Tn_de := [1, 0, 0, 0*m; 0, 1, 0, 0*m; 0, 0, 1, L_de; 0, 0, 0, 1*m]
Rz_de := [1, -(Mz_de*L_de/(Jde*G)), 0, 0*m; Mz_de*L_de/(Jde*G), 1, 0, 0*m; 0, 0, 1, 0*m; 0, 0, 0, 1*m]
Rx_de := [
    1, 0, 0, 0*m;
    0, 1, -(My_de*L_de/(E*Ide) + Fx_de*L_de^2/(2*E*Ide) + Rb_x*(L_de/2)^2/(2*E*Ide)), 0*m;
    0, My_de*L_de/(E*Ide) + Fx_de*L_de^2/(2*E*Ide) + Rb_x*(L_de/2)^2/(2*E*Ide), 1, 0*m;
    0, 0, 0, 1*m
]
Ry_de := [
    1, 0, Mx_de*L_de/(E*Ide) + Fy_de*L_de^2/(2*E*Ide) + Rb_y*(L_de/2)^2/(2*E*Ide), 0*m;
    0, 1, 0, 0*m;
    -(Mx_de*L_de/(E*Ide) + Fy_de*L_de^2/(2*E*Ide) + Rb_y*(L_de/2)^2/(2*E*Ide)), 0, 1, 0*m;
    0, 0, 0, 1*m
]
Tde := U_s*Tn_de*U_s*Tx_de*U_s*Ty_de*U_s*Tz_de
Rde := U_s*Rx_de*U_s*Ry_de*U_s*Rz_de
Hde := Tde*Rde
# Segment CD
Icd := pi*D_cd^4/64
Jcd := pi*D_cd^4/32
Acd := pi*D_cd^2/2
Fx_cd := F_cut_x + Rb_x
Fz_cd := F_feed_z
Fy_cd := F_cut_y + Rb_y
Mz_cd := F_cut_y*D_part/2
My_cd := F_cut_x*(L_part + L_ef + L_de) + Rb_x*L_de/2
Mx_cd := F_cut_y*(L_part + L_ef + L_de) + Rb_y*L_de/2
Tz_cd := [1, 0, 0, 0*m; 0, 1, 0, 0*m; 0, 0, 1, Fz_cd*L_cd/(Acd*E); 0, 0, 0, 1*m]
Ty_cd := [1, 0, 0, 0*m; 0, 1, 0, Mx_cd*L_cd^2/(2*E*Icd) + Fy_cd*L_cd^3/(3*E*Icd); 0, 0, 1, 0*m; 0, 0, 0, 1*m]
Tx_cd := [1, 0, 0, My_cd*L_cd^2/(2*E*Icd) + Fx_cd*L_cd^3/(3*E*Icd); 0, 1, 0, 0*m; 0, 0, 1, 0*m; 0, 0, 0, 1*m]
Tn_cd := [1, 0, 0, 0*m; 0, 1, 0, 0*m; 0, 0, 1, L_cd; 0, 0, 0, 1*m]
Rz_cd := [1, -(Mz_cd*L_cd/(Jcd*G)), 0, 0*m; Mz_cd*L_cd/(Jcd*G), 1, 0, 0*m; 0, 0, 1, 0*m; 0, 0, 0, 1*m]
Rx_cd := [
    1, 0, 0, 0*m;
    0, 1, -(My_cd*L_cd/(E*Icd) + Fx_cd*L_cd^2/(2*E*Icd)), 0*m;
    0, My_cd*L_cd/(E*Icd) + Fx_cd*L_cd^2/(2*E*Icd), 1, 0*m;
    0, 0, 0, 1*m
]
Ry_cd := [
    1, 0, Mx_cd*L_cd/(E*Icd) + Fy_cd*L_cd^2/(2*E*Icd), 0*m;
    0, 1, 0, 0*m;
    -(Mx_cd*L_cd/(E*Icd) + Fy_cd*L_cd^2/(2*E*Icd)), 0, 1, 0*m;
    0, 0, 0, 1*m
]
Tcd := U_s*Tn_cd*U_s*Tx_cd*U_s*Ty_cd*U_s*Tz_cd
Rcd := U_s*Rx_cd*U_s*Ry_cd*U_s*Rz_cd
Hcd := Tcd*Rcd
# Segment BC
Ibc := pi*D_bc^4/64
Jbc := pi*D_bc^4/32
Abc := pi*D_bc^2/2
Fx_bc := F_cut_x + Rb_x
Fz_bc := F_feed_z
Fy_bc := F_cut_y + Rb_y
Mz_bc := F_cut_y*D_part/2
My_bc := F_cut_x*(L_part + L_ef + L_de + L_cd) + Rb_x*(L_de/2 + L_cd)
Mx_bc := F_cut_y*(L_part + L_ef + L_de + L_cd) + Rb_y*(L_de/2 + L_cd)
Tz_bc := [1, 0, 0, 0*m; 0, 1, 0, 0*m; 0, 0, 1, Fz_bc*L_bc/(Abc*E) - Ra_z*(L_bc/2)/(Abc*E); 0, 0, 0, 1*m]
Ty_bc := [
    1, 0, 0, 0*m;
    0, 1, 0, Mx_bc*L_bc^2/(2*E*Ibc) + Fy_bc*L_bc^3/(3*E*Ibc) + 5*Ra_y*(L_bc/2)^3/(2*3*E*Ibc);
    0, 0, 1, 0*m;
    0, 0, 0, 1*m
]
Tx_bc := [
    1, 0, 0, My_bc*L_bc^2/(2*E*Ibc) + Fx_bc*L_bc^3/(3*E*Ibc) + 5*Ra_x*(L_bc/2)^3/(2*3*E*Ibc);
    0, 1, 0, 0*m;
    0, 0, 1, 0*m;
    0, 0, 0, 1*m
]
Tn_bc := [1, 0, 0, 0*m; 0, 1, 0, 0*m; 0, 0, 1, L_bc; 0, 0, 0, 1*m]
Rz_bc := [1, -(Mz_bc*L_cd/(Jcd*G)), 0, 0*m; Mz_bc*L_cd/(Jcd*G), 1, 0, 0*m; 0, 0, 1, 0*m; 0, 0, 0, 1*m]
Rx_bc := [
    1, 0, 0, 0*m;
    0, 1, -(My_bc*L_bc/(E*Ibc) + Fx_bc*L_bc^2/(2*E*Ibc) + Ra_x*(L_bc/2)^2/(2*E*Ibc)), 0*m;
    0, My_bc*L_bc/(E*Ibc) + Fx_bc*L_bc^2/(2*E*Ibc) + Ra_x*(L_bc/2)^2/(2*E*Ibc), 1, 0*m;
    0, 0, 0, 1*m
] = [1, 0, 0, 0 m; 0, 1, 1.94517e-6, 0 m; 0, -1.94517e-6, 1, 0 m; 0, 0, 0, 1 m]
Ry_bc := [
    1, 0, Mx_bc*L_bc/(E*Ibc) + Fy_bc*L_bc^2/(2*E*Ibc) + Ra_y*(L_bc/2)^2/(2*E*Ibc), 0*m;
    0, 1, 0, 0*m;
    -(Mx_bc*L_bc/(E*Ibc) + Fy_bc*L_bc^2/(2*E*Ibc) + Ra_y*(L_bc/2)^2/(2*E*Ibc)), 0, 1, 0*m;
    0, 0, 0, 1*m
]
Tbc := U_s*Tn_bc*U_s*Tx_bc*U_s*Ty_bc*U_s*Tz_bc
Rbc := U_s*Rx_bc*U_s*Ry_bc*U_s*Rz_bc
Hbc := Tbc*Rbc
# Segment AB
Iab := pi*D_ab^4/64
Jab := pi*D_ab^4/32
Aab := pi*D_ab^2/2
Fx_ab := F_cut_x + Ra_x + Rb_x
Fz_ab := F_feed_z + Ra_z
Fy_ab := F_cut_y + Ra_y + Rb_y
Mz_ab := F_cut_y*D_part/2
My_ab := F_cut_x*(L_part + L_ef + L_de + L_cd) + Rb_x*(L_de/2 + L_cd + L_bc) + Ra_x*(L_bc/2)
Mx_ab := F_cut_y*(L_part + L_ef + L_de + L_cd) + Rb_y*(L_de/2 + L_cd + L_bc) + Ra_y*(L_bc/2)
Tz_ab := [1, 0, 0, 0*m; 0, 1, 0, 0*m; 0, 0, 1, Fz_ab*L_ab/(Aab*E); 0, 0, 0, 1*m]
Ty_ab := [
    1, 0, 0, 0*m;
    0, 1, 0, Mx_ab*L_ab^2/(2*E*Iab) + Fy_ab*L_ab^3/(3*E*Iab) + 5*F_t*(L_bc/2)^3/(2*3*E*Iab);
    0, 0, 1, 0*m;
    0, 0, 0, 1*m
]
Tx_ab := [1, 0, 0, My_ab*L_ab^2/(2*E*Iab) + Fx_ab*L_ab^3/(3*E*Iab); 0, 1, 0, 0*m; 0, 0, 1, 0*m; 0, 0, 0, 1*m]
Tn_ab := [1, 0, 0, 0*m; 0, 1, 0, 0*m; 0, 0, 1, L_ab; 0, 0, 0, 1*m]
Rz_ab := [
    1, -(Mz_ab*L_ab/(Jab*G) - M_mot*(L_ab/2)/(Jab*G)), 0, 0*m;
    Mz_ab*L_ab/(Jab*G) - M_mot*(L_ab/2)/(Jab*G), 1, 0, 0*m;
    0, 0, 1, 0*m;
    0, 0, 0, 1*m
]
Rx_ab := [
    1, 0, 0, 0*m;
    0, 1, -(My_ab*L_ab/(E*Iab) + Fx_ab*L_ab^2/(2*E*Iab)), 0*m;
    0, My_ab*L_ab/(E*Iab) + Fx_ab*L_ab^2/(2*E*Iab), 1, 0*m;
    0, 0, 0, 1*m
]
Ry_ab := [
    1, 0, Mx_ab*L_ab/(E*Iab) + Fy_ab*L_ab^2/(2*E*Iab) + F_t*(L_ab/2)^2/(2*E*Iab), 0*m;
    0, 1, 0, 0*m;
    -(Mx_ab*L_ab/(E*Iab) + Fy_ab*L_ab^2/(2*E*Iab) + F_t*(L_ab/2)^2/(2*E*Iab)), 0, 1, 0*m;
    0, 0, 0, 1*m
]
Tab := U_s*Tn_ab*U_s*Tx_ab*U_s*Ty_ab*U_s*Tz_ab
Rab := U_s*Rx_ab*U_s*Ry_ab*U_s*Rz_ab
Hab := Tab*Rab
# Summary Calculations
P_tool := [-D_part/2; 0; 0; 1]
P_tool_f := Hab*Hbc*Hcd*Hde*Hef*Hfp*P_tool = [-0.0124486 m; -1.02049e-5 m; 0.168409 m; 1]
P_tool_0 := (U_s*Tn_ab*U_s*Tn_bc*U_s*Tn_cd*U_s*Tn_de*U_s*Tn_ef*U_s*Tn_fp*P_tool)
P_deflection := P_tool_f - P_tool_0 = [5.13808e-5 m; -1.02049e-5 m; 8.6866e-6 m; 0]
