# Tool Mount & Cross-Slide - HTMs
# Leadscrew Characteristics
# References
# Left Hand: https://www.mcmaster.com/90036A229/
# Right Hand: https://www.mcmaster.com/98957A633/
# Leadscrew Dimensions
d_thread := 0.25 in
TPI_thread := 20 1/in
P_thread := 1/TPI_thread
L_ls := 8 cm
# Leadscrew Properties
E_ls := 200 GPa
k_leadscrew := (π*(d_thread/2)^2)*E_ls/L_ls = 79.173 N/μm
